AAAZ
PR_ResolutionTtot
DEBPROC PR_ResolutionTtot M C K CL_A CHA alpha beta gamma dt Ttot U0 V0;

  U_t  = U0;
  V_t  = V0;
  A_t  = U0 * 0;

  U_sol = TABLE;
  V_sol = TABLE;
  A_sol = TABLE;

  U_sol.1 = U0;
  V_sol.1 = V0;

  NbCharg = DIMENSION CHA ;

  REPETER It_T En_Nb_Re;

    Si (NbCharg > 0);
        REPETER It2 NbCharg ;
            CHA_i = EXTR CHA CHAR &It2 ;
            CHP_i = EXTR CHA_i CHAM ;

            EVO_i = EXTR CHA_i EVOL ;
            CHA_ord = EXTR EVO_i ORDO;
            Val = EXTR CHA_ord &It_T;
            Si (&It_T neg 1);
              Val_t_m = EXTR CHA_ord (&It_T-1);
              Val = ((1+alpha)*Val) - (alpha*Val_t_m) ;
            FinSi ;

            Si (&It2 ega 1) ;
              FOR_Imp = CHP_i * Val ;
            SiNon ;
              FOR_Imp = FOR_Imp + (CHP_i * Val) ;
            FinSi ;
        FIN It2 ;
    SiNon ;
        FOR_Imp = U0 * 0;
    FinSi ;

    // Mess 'Instant ' &It_T ;

    A_t V_t U_t= PR_ResolutionInstantT M C K CL_A FOR_Imp alpha beta gamma dt U_t V_t A_t;

    Si (&It_T > 1);
      U_sol.&It_T = U_t;
      V_sol.&It_T = V_t;
    FinSi ;
    A_sol.&It_T = A_t;


    // Si C_POD ;
    //     Mess 'It_T' &It_T 'HHHHHHHHHHHHHHHH';
    //     Si (&It_T EGA 2) ;
    //         list (EXTR ZZZ 4) ;
    //     FinSi ;
    // FinSi ;

  FIN It_T;

  Solution = TABLE;

  Solution.U = U_sol;
  Solution.V = V_sol;
  Solution.W = A_sol;

  RESPRO Solution ;

FINPROC;
