AAKZ
PR_AffichageDepNoeud
DEBPROC PR_AffichageDepNoeud AffMods*ListEnti AffSolu*ListEnti Pt_Aff*Point
Coord Gr_ndeur*MOT;

    NbMod = DIMENSION FamiF.Cal
            + (DIME FamiF.Ini)
            + (DIME FamiF.Imp);

    NbMax = MAXI (AffMods et AffSolu);

    Si (NbMax > NbMod);
        Mess 'Il n y a que ' NbMod ' modes' ;
        opti donn 5;
    FinSi ;

    NbModCal = (NbMax - (DIME FamiF.Ini)) - (DIME FamiF.Imp);
    FamiFTot FamiGTot = PR_ConcatenerFami NbModCal ;

    Lis_dir = PROG;
    REPE It_T En_Nb_Re;
      Lis_dir = Lis_dir ET
                (PROG (EXTR (Sol_Dir.Gr_ndeur.&It_T) Coord Pt_Aff));
    FIN It_T;

    Evol_dir = EVOL MANU Vec_T Lis_dir ;

    * Sortie Fichier
        *opti sort (chain 'Direct' ) ;
        *sort exce (Evol_dir) sepa VIRG;

    Sol_k = TABLE;
    Mod_k = TABLE;

    Si (NbMax > 0);
        REPETER It2 NbMax;
            Val = EXTR FamiFTot.&It2 Coord Pt_Aff;

            Sol_PGD = Val * FamiGTot.&It2.Gr_ndeur ;

            Mod_k.&It2 = Sol_PGD;

            Si (&It2 > 1);
                It_prec = &It2 - 1;
                Sol_k.&It2 = Sol_k.It_prec + Mod_k.&It2 ;
            SiNon ;
                Sol_k.&It2 = Sol_PGD;
            FinSi ;
        FIN It2;
    SiNon;
        Dess (Evol_dir);
        // Dess (Evol_dir et (D_Imp.1 .TabEvo.Gr_ndeur) );
        // Dess (Evol_dir - (D_Imp.1 .TabEvo.Gr_ndeur) );

        Si (Nb_NL ega 1) ;
            Si ( Pt_Aff ega (Pb.Tab_NL.1 .Poi_int) ) ;
                Si (EGA Coord (Pb.Tab_NL.1 .Dir_int) );
                    Var_NL = (Pb.Tab_NL.1 .fac_int) * Lis_dir ;
                    Eff_NL = PR_Eval_Evo_NL (Pb.Tab_NL.1) Var_NL ;
                    Evo_Eff = EVOL Roug MANU Vec_T Eff_NL ;
                    * Sortie Fichier
                        *opti sort (chain 'EffortNonLinDir' ) ;
                        *sort exce (Evo_Eff) sepa VIRG;
                    DESS Evo_Eff ;
                FinSi ;
            FinSi ;
        FinSi ;
    FinSi;

    Evo_k = TABLE;
    LMot = MOTS 'ROUG' 'BLEU' 'VERT' 'JAUN' 'VIOL' 'TURQ';

    * Affichage des Solutions

    Si ( (DIMENSION AffSolu) > 0);
        REPETER It (MINI ((DIMENSION AffSolu) et 6));

            col = EXTR LMot &It;
            num = (EXTR AffSolu &It);

            Evo_k.&It = EVOL col MANU Vec_T Sol_k.num;
            Si (&It ega 1) ;
                Tot = Evol_dir et Evo_k.&It;
            SiNon ;
                Tot = Tot et Evo_k.&It;
            FinSi ;

            * Sortie Fichier
                *opti sort (chain 'SoluPGD' &It ) ;
                *sort exce (Evo_k.&It) sepa VIRG;
        Fin It;

        DESS Tot ;

    FinSi ;


    * Affichage des modes

    Si ( (DIMENSION AffMods) > 0);
        REPETER It (MINI ((DIMENSION AffMods) et 6));
            col = EXTR LMot &It;
            num = EXTR AffMods &It;
            Evo_k.&It = EVOL col MANU Vec_T Mod_k.num ;
            Si (&It ega 1) ;
                Tot = Evol_dir et Evo_k.&It;
            SiNon ;
                Tot = Tot et Evo_k.&It;
            FinSi ;
            * Sortie Fichier
                *opti sort (chain 'ModePGD' &It ) ;
                *sort exce (Evo_k.&It) sepa VIRG;
        Fin It;

        DESS Tot ;
        *XBOR 0. 1e-2 YBOR -4e-3 1e-3;
    FinSi ;

    Si (NbMax > 0) ;
        Si (Nb_NL ega 1) ;
            Si ( Pt_Aff ega (Pb.Tab_NL.1 .Poi_int) ) ;
                Si (EGA Coord (Pb.Tab_NL.1 .Dir_int) );
                    Var_NL = (Pb.Tab_NL.1 .fac_int) * Sol_k.NbMax ;
                    Eff_NL = PR_Eval_Evo_NL (Pb.Tab_NL.1) Var_NL ;
                    Evo_Eff = EVOL Roug MANU Vec_T Eff_NL ;
                    * Sortie Fichier
                        *opti sort (chain 'EffortNonLinPGD' ) ;
                        *sort exce (Evo_Eff) sepa VIRG;
                    DESS Evo_Eff ;
                FinSi ;
            FinSi ;
        FinSi ;
    FinSi ;


FINPROC;
